*Heading
** Job name: TPB Model name: Model-1
** Generated by: Abaqus/CAE 2024
*Preprint, echo=NO, model=NO, history=NO, contact=NO
**
** PARTS
**
*Part, name=TPB
*Node
      1,         -2.5,  -6.15500021
      2,         -7.5,  -6.15500021
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*********************** RECTENGULAR ***************************
*User element, nodes=4, type=U2, properties=7, coordinates=2, VARIABLES=16
1,2
1,11
1,4
***************************************************************
*********************** TRIANGULAR ****************************
*User element, nodes=3, type=U1, properties=7, coordinates=2, VARIABLES=12
1,2
1,11
1,4
***************************************************************
***************************************************************
*Element, type=U2
1, 1,   2, 551, 45
2, 2,  25, 552, 551
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***************************************************************
***************************************************************
*Element, type=U1
5105, 5343, 5337, 5341
5149, 5622, 5367, 5368
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***************************************************************
***************************************************************
********************** ASSIGNING MATERIAL PROP ****************
*Elset, elset=sample, generate
    1,  5527,     1
***************************************************************
*Uel property, elset=sample
20000, 0.2, 2.4, 2.5, 0.113, 2, 0
**E, nu, ft, lc, gc, k, ms
***************************************************************
*Element, type=CPE4
5528, 1,   2, 551, 45
5529, 2,  25, 552, 551
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***************************************************************
*Element, type=CPE3
10632, 5343, 5337, 5341
10676, 5622, 5367, 5368
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***************************************************************
*Elset, elset=umatelem, generate
5528, 11054, 1
***************************************************************
*Solid Section, elset=umatelem, material=Material-1
1.0
*End Part
**
**
** ASSEMBLY
**
*Assembly, name=Assembly
**
*Instance, name=TPB-1, part=TPB
*End Instance
**
*Node
      1, -0.335315704,          55.,           0.
*Nset, nset=RP
 1,
*Nset, nset=left, instance=TPB-1
 13,
*Nset, nset=orig, instance=TPB-1
    1,    2,    3,    4,    5,    6
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*Elset, elset=orig, instance=TPB-1
    1,    2,    3,    4,    5,    6
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*Nset, nset=right, instance=TPB-1
 9,
*Nset, nset=top, instance=TPB-1
  22,  23, 505, 506, 507, 508, 509, 510, 511, 512, 513, 514, 515, 516, 517, 518
*Elset, elset=top, instance=TPB-1, generate
 3004,  4404,   100
** Constraint: Constraint-1
*Equation
2
top, 2, 1.
RP, 2, -1.
**
*Elset, elset=umatelem, instance=TPB-1, generate
5528, 11054, 1
**
*End Assembly
***************************************************************
**
** MATERIALS
**
*Material, name=Material-1
*Depvar
      4,
*User Material, constants=1
0.,
** ----------------------------------------------------------------
**
** STEP: Step-1
**
*Step, name=Step-1, nlgeom=NO, inc=10000
*Static
0.01, 1., 1e-05, 0.01
*Solution Technique, type=QUASI-NEWTON, reform kernel=25
**
** BOUNDARY CONDITIONS
**
** Name: fix_left Type: Displacement/Rotation
*Boundary
left, 1, 1
left, 2, 2
** Name: load Type: Displacement/Rotation
*Boundary
RP, 1, 1
RP, 2, 2, -1.
** Name: right Type: Displacement/Rotation
*Boundary
right, 2, 2
** Name: toporig Type: Displacement/Rotation
*Boundary
orig, 11, 11
**
** CONTROLS
**
*Controls, reset
*Controls, parameters=time incrementation
10000, 10000, 8000, 2000, 5000, 5, , 10, , ,
*Controls, parameters=line search
25, , , , 0.01
**
** OUTPUT REQUESTS
**
*Restart, write, frequency=0
**
** FIELD OUTPUT: F-Output-1
**
*Output, field
*Node Output
NT, RF, U
*Element Output, directions=YES
SDV,
**
** HISTORY OUTPUT: H-Output-1
**
*element output, elset=umatelem
SDV
**
*End Step
